# LAMMPS input: Li+ diffusion in basalt fiber
# NVT MD at 300K for MSD/diffusion coefficient calculation
# Buckingham + Coulomb potential

units           metal
atom_style      charge
boundary        p p p
read_data       basalt_Li.data

# ---- Potential: Buckingham + Coulomb (long-range) ----
pair_style      hybrid/overlay buck/coul/long 12.0 12.0

# Short-range Buckingham parameters
# Si-O (type 1-8)
pair_coeff      1 8 buck/coul/long 1001.3929 0.2910 0.0
# Al-O (type 2-8)
pair_coeff      2 8 buck/coul/long 1200.4198 0.2990 0.0
# Fe-O (type 3-8)
pair_coeff      3 8 buck/coul/long 1155.4560 0.3020 0.0
# Ca-O (type 4-8)
pair_coeff      4 8 buck/coul/long 978.7393 0.3220 0.0
# Mg-O (type 5-8)
pair_coeff      5 8 buck/coul/long 821.6200 0.2990 0.0
# Na-O (type 6-8)
pair_coeff      6 8 buck/coul/long 788.6431 0.3390 0.0
# Ti-O (type 7-8)
pair_coeff      7 8 buck/coul/long 1300.0000 0.2950 0.0
# O-O (type 8-8)
pair_coeff      8 8 buck/coul/long 2029.2205 0.2650 24.0
# Li-O (type 9-8)
pair_coeff      9 8 buck/coul/long 274.4230 0.2620 0.0

# Self and cross cation interactions (zero Buckingham, only Coulomb)
pair_coeff      1 1 buck/coul/long 0.0 1.0 0.0
pair_coeff      2 2 buck/coul/long 0.0 1.0 0.0
pair_coeff      3 3 buck/coul/long 0.0 1.0 0.0
pair_coeff      4 4 buck/coul/long 0.0 1.0 0.0
pair_coeff      5 5 buck/coul/long 0.0 1.0 0.0
pair_coeff      6 6 buck/coul/long 0.0 1.0 0.0
pair_coeff      7 7 buck/coul/long 0.0 1.0 0.0
pair_coeff      9 9 buck/coul/long 0.0 1.0 0.0

# Cation-cation cross terms (zero Buckingham)
pair_coeff      1 2 buck/coul/long 0.0 1.0 0.0
pair_coeff      1 3 buck/coul/long 0.0 1.0 0.0
pair_coeff      1 4 buck/coul/long 0.0 1.0 0.0
pair_coeff      1 5 buck/coul/long 0.0 1.0 0.0
pair_coeff      1 6 buck/coul/long 0.0 1.0 0.0
pair_coeff      1 7 buck/coul/long 0.0 1.0 0.0
pair_coeff      1 9 buck/coul/long 0.0 1.0 0.0
pair_coeff      2 3 buck/coul/long 0.0 1.0 0.0
pair_coeff      2 4 buck/coul/long 0.0 1.0 0.0
pair_coeff      2 5 buck/coul/long 0.0 1.0 0.0
pair_coeff      2 6 buck/coul/long 0.0 1.0 0.0
pair_coeff      2 7 buck/coul/long 0.0 1.0 0.0
pair_coeff      2 9 buck/coul/long 0.0 1.0 0.0
pair_coeff      3 4 buck/coul/long 0.0 1.0 0.0
pair_coeff      3 5 buck/coul/long 0.0 1.0 0.0
pair_coeff      3 6 buck/coul/long 0.0 1.0 0.0
pair_coeff      3 7 buck/coul/long 0.0 1.0 0.0
pair_coeff      3 9 buck/coul/long 0.0 1.0 0.0
pair_coeff      4 5 buck/coul/long 0.0 1.0 0.0
pair_coeff      4 6 buck/coul/long 0.0 1.0 0.0
pair_coeff      4 7 buck/coul/long 0.0 1.0 0.0
pair_coeff      4 9 buck/coul/long 0.0 1.0 0.0
pair_coeff      5 6 buck/coul/long 0.0 1.0 0.0
pair_coeff      5 7 buck/coul/long 0.0 1.0 0.0
pair_coeff      5 9 buck/coul/long 0.0 1.0 0.0
pair_coeff      6 7 buck/coul/long 0.0 1.0 0.0
pair_coeff      6 9 buck/coul/long 0.0 1.0 0.0
pair_coeff      7 9 buck/coul/long 0.0 1.0 0.0

# Long-range Coulomb (PPPM)
kspace_style    pppm 1.0e-5

# ---- Neighbor list ----
neighbor        2.0 bin
neigh_modify    delay 5

# ---- Equilibration at 300K ----
reset_timestep  0
velocity        all create 300.0 98765 mom yes rot yes

fix             1 all nvt temp 300.0 300.0 0.1
thermo          100
thermo_style    custom step temp pe ke etotal press vol density

run             10000  # 10 ps equilibration
unfix           1

# ---- Production run: NVT at 300K with MSD calculation ----
reset_timestep  0

fix             2 all nvt temp 300.0 300.0 0.1

# Define Li group
group           Li_group type 9

# MSD for Li+ ions
compute         msd_Li Li_group msd
fix             msd_out Li_group ave/time 10 10 100 c_msd_Li[1] c_msd_Li[2] c_msd_Li[3] c_msd_Li[4] file msd_Li.dat

# RDF for Li-O (output via thermo)
compute         rdf_LiO all rdf 500 9 8

thermo          100
thermo_style    custom step temp pe ke etotal press vol density

# Trajectory output
dump            1 all custom 500 traj_li_diffusion.xyz id type x y z

run             50000   # 50 ps production run
unfix           2

# ---- Save results ----
write_data      basalt_Li_final.data
write_dump      all custom basalt_Li_final.xyz id type x y z

print "=== Li+ diffusion simulation complete ==="
